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/batch
! ANSYS input file written by Workbench version 2022 R2
! File used for geometry attach: C:\Users\Thomas\Documents\Ansys_projekte\Klotz_for_aster\Klotz_for_aster_files\dp0\Geom\DM\Geom.scdoc
/title,Klotz_for_aster--Statisch-mechanisch (B5)
/COM,/COM,     ANSYSMotion, 2022.2
/com,--- Data in consistent NMM units. See Solving Units in the help system for more information.
/units,MPA
/prep7
! Turn off shape checking because checks already performed inside WB mesher.
! See help system for more information.
SHPP,OFF,,NOWARN
etcon,set             ! allow ANSYS to choose best KEYOP's for 180x elements, resets any applicable keyopt to MAPDL defaults
/com,*********** Nodes for the whole assembly ***********
nblock,3,,29
(1i9,3e20.9e3)
        1     1.500000000E+00     4.500000000E+00     2.500000000E+00
        2     1.500000000E+00     0.000000000E+00     2.500000000E+00
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-1
/com,*********** Elements for Body 1 "Geom\Volumenk_rper" ***********
et,1,185
eblock,19,solid,,8
(19i9)
        1        1        1        1        0        0        0        0        8        0        1        1       22       24       26        2       23       25       27
        1        1        1        1        0        0        0        0        8        0        2        1       26       24       22        3        4        5        6
        1        1        1        1        0        0        0        0        8        0        3        1       18       20       22        2       19       21       23
        1        1        1        1        0        0        0        0        8        0        4        1       22       20       18        3        6        7        8
        1        1        1        1        0        0        0        0        8        0        5        1       26       14       12        2       27       15       13
        1        1        1        1        0        0        0        0        8        0        6        1       12       14       26        3       10       11        4
        1        1        1        1        0        0        0        0        8        0        7        1       12       16       18        2       13       17       19
        1        1        1        1        0        0        0        0        8        0        8        1       18       16       12        3        8        9       10
-1
/com,*********** Send User Defined Coordinate System(s) ***********
csys,0
toffst,273.15,  ! Temperature offset from absolute zero
/com,*********** Set Reference Temperature ***********
tref,22.
/com,*********** Send Materials ***********
Temperature = 'TEMP' ! Temperature
MP,DENS,1,7.85e-09,	! tonne mm^-3
MP,ALPX,1,1.2e-05,	! C^-1
MP,C,1,434000000,	! mm^2 s^-2 C^-1
MP,KXX,1,60.5,	! tonne mm s^-3 C^-1
MP,RSVX,1,0.00017,	! ohm mm
MP,EX,1,200000,	! tonne s^-2 mm^-1
MP,NUXY,1,0.3,
MP,MURX,1,10000,

!************************* Model Summary ********************
!Geom\Volumenk_rper,	Baustahl,	matid,	1
!************************* End Model Summary ********************
/com,*********** Send Named Selection as Node Component ***********
CMBLOCK,FLAECHE_777,NODE,        9
(8i10)
         7         8         9        16        17        18        19        20
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/com,******* Constant Zero Displacement X *******
CMBLOCK,_DISPZEROUX,NODE,        9
(8i10)
         7         8         9        16        17        18        19        20
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cmsel,s,_DISPZEROUX
d,all,ux,0
nsel,all
/com,******* Constant Zero Displacement Y *******
CMBLOCK,_DISPZEROUY,NODE,        9
(8i10)
         7         8         9        16        17        18        19        20
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cmsel,s,_DISPZEROUY
d,all,uy,0
nsel,all
/com,******* Constant Zero Displacement Z *******
CMBLOCK,_DISPZEROUZ,NODE,        9
(8i10)
         7         8         9        16        17        18        19        20
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cmsel,s,_DISPZEROUZ
d,all,uz,0
nsel,all
/com,*********** Define Pressure Using Surface Effect Elements "Druck" ***********
et,2,154
eblock,10,,,4
(15i9)
       33        2        2        2        0       13       12       16       17
       34        2        2        2        0       15       14       12       13
       35        2        2        2        0       12       10        9       16
       36        2        2        2        0       14       11       10       12
-1
esel,s,type,,2
keyop,2,7,0                ! Use deformed area for application of load
esel,all
esel,all
fini
/com,****************************************************************************
/com,*************************    SOLUTION       ********************************
/com,****************************************************************************
/solu
antype,0                   ! static analysis
_thickRatio=  0     ! Ratio of thick parts in the model
eqsl,sparse,,,,,1
cntr,print,1               ! print out contact info and also make no initial contact an error
dmpoption,emat,no             ! Don't combine emat file for DANSYS
dmpoption,esav,no             ! Don't combine esav file for DANSYS
nldiag,cont,iter           ! print out contact info each equilibrium iteration
rescontrol,,none                 ! Do not keep any restart files
/com,****************************************************
/com,******************* SOLVE FOR LS 1 OF 1 ****************
esel,s,type,,2
nsle
sf,all,pres,1.
nsel,all
esel,all
esel,all
nsub,1,1,1
time,1.
outres,erase
outres,all,none
outres,nsol,all,
outres,rsol,all
outres,eangl,all
outres,etmp,all
outres,veng,all
outres,strs,all,
outres,epel,all,
outres,eppl,all,
outres,cont,all,
! *********** WB SOLVE COMMAND ***********
! check interactive state
*get,ANSINTER_,active,,int
*if,ANSINTER_,ne,0,then
/eof
*endif
solve
/com *************** Write FE CONNECTORS *********
CEWRITE,file,ce,,INTE
/com,****************************************************
/com,*************** FINISHED SOLVE FOR LS 1 *************
*get,_NSOLTHREADS,active,0,ntfs
*get,_NSOLPROCESSES,active,0,npfs
/post1
fini
